ro := roO2*kg/m^3  # error: This variable is undefined. Check that the label is set correctly.
roO2 := 1.225
vol := 1*m^3
volmass := ro*vol → kg*roO2
molarMassO2 := 32 gm/mol
molMass := molarMassO2
Nmol := volmass/molMass = 38.2812 mol
Npt := Nmol*N_A = 2.30535e25  # count of particles in 1M3 giver RO
pszO := 0.299*10^-12 m
psz := pszO
lw := 600 nm
lwCells := m/lw  # count of Light cells per 1m
lwCellsM3 := lwCells^3  # count of Light cells in 1m3
ptCellPerLcell := (lw/psz)^3 = 8.08054e18  # count of particle cells in light cell. per volume
cellsM3 := (1*m/psz)^3 = 3.74099e37  # count of particle cells in 1m3
# probability to encounter particle in one particle cell per m3
PptM3 := Npt/cellsM3 = 6.16241e-13
PptLc := PptM3*ptCellPerLcell = 4979558  # probability to encounter particle in one Light Cell
P_m := PptLc*lwCells = 8299262734875  # probability for light wave to encounter particles over 1m
P_km := P_m*1000 = 8.29926e15  # probability for light wave to encounter particles over 1km
trk := 1
Ttrk := 1 - psz/lw*trk → -1.0*0.498333333333*10^-15*m/nm + 1.0
ProbPerDist(dist) := P_km*dist
Ttrk^ProbPerDist(1000) → (-1.0*0.498333333333*10^-15*m/nm + 1.0)^8299262734875000000 = 0
