h(p) := |p| - Rp  # error: This variable is undefined. Check that the label is set correctly.
ro(h) := Adens0 - h/Ha*Adens0  # error: This variable is undefined. Check that the label is set correctly.
scat(ro) := ro*kS  # error: This variable is undefined. Check that the label is set correctly.
integral(ro(h), h = ho .. Ha) → Adens0*ho^2/(2*Ha) + (Adens0*Ha/2 - Adens0*ho)
pos(t, p0, pM) := p0 + pM*t
Lmax(sp, LightVec) := (sp + (0 - sp)*LightVec*LightVec)^2
LightLeft(sp) := integral(scat(ro(h(pos(t, sp, Lmax(sp, LightVec)))))*Lmax(sp, LightVec), t = 0 .. 1)  # error: This variable is undefined. Check that the label is set correctly.
LightLeft(spos) → integral(-(Adens0*kS*Lmax(spos, LightVec)*|Lmax(spos, LightVec) + spos|)/Ha)*1 + (Adens0*Rp*kS*Lmax(spos, LightVec)/Ha + Adens0*kS*Lmax(spos, LightVec) - integral(-(Adens0*kS*Lmax(spos, LightVec)*|spos|)/Ha)*0)
