# Parametrization of line is blend between points
pos(t, p0, pM) := p0*(1 - t) + pM*t
d/dt(pos(t, p0, pM)) → pM - p0
# arclength of a line between 2 pts
integral(|pM - p0|, t = 0 .. 1) → sqrt((pM - p0)^2)
integral(vectorize(pos(t, p0, pM)*y)*|d/dt(pos(t, p0, pM))|, t = 0 .. 1) → y*(pM + p0)*sqrt((pM - p0)^2)/2
h(p) := |p| - Rp
d/dt(vectorize(pos(t)))  # error: An unexpected internal error occurred within Mathcad.
Pv
fragDir
R := Rp + Ha
Pve_(Pv) := (0 - Pv)*fragDir + sqrt(R^2 - |Pv + ((0 - Pv)*fragDir)*fragDir|^2)
# Calculation of endpoint for view ray
EndP(p, dir) := (0 - p)*dir + sqrt(R^2 - |p + ((0 - p)*dir)*dir|^2)
EndP([0; 50; 0], [0; 1; 0]) =  # error: This variable is undefined. Check that the label is set correctly.
EndP(p, dir) → sqrt(-|(dir^2 - 1)*p|^2 + (Rp + Ha)^2) - dir*p
# in final solution replace all squares with direct multiplication
pLerp(t, p0, pM) := p0*(1 - t) + pM*t
h(pt) := |pt| - Rp
ro(h) := Adens0 - h/Ha*Adens0
sct(ro) := sk*ro
integral(ro(h(pLerp(t, Pv, Pve)))*|d/dt(pLerp(t, Pv, Pve))|, t = 0 .. 1) → {
    if Pv/(Pve - Pv) ≥ 0 or Pve/(Pve - Pv) ≤ 0
        -(Adens0*((Pve + Pv)*sqrt(Pve^2) - (2*Pve*Rp + 2*Ha*Pve))*sqrt((Pve - Pv)^2))/(2*Ha*Pve)
    else
        undefined
}
# this integral gives sum of leftover light over point of view ray
veiwLine(t1) := pLerp(t1, Pv, Pve)
rayLine(t2, t1) := pLerp(t2, pLerp(t1, Pv, Pve), EndP(viewLine(t1), toLdir))
rayLine(x, y) → x*(sqrt(-|viewLine(y)*(toLdir^2 - 1)|^2 + (Rp + Ha)^2) - toLdir*viewLine(y)) + (1 - x)*(Pv*(1 - y) + Pve*y)
integral(integral(ro(h(rayLine(t, s)))*|d/dt(rayLine(t, s))|, t = 0 .. 1)*|d/ds(viewLine(s))|, s = 0 .. 1)
integral(integral(ro(h(pLerp(t, pLerp(s, Pv, Pve), EndP(pLerp(s, Pv, Pve), toLdir))))*|d/dt(pLerp(t, pLerp(s, Pv, Pve), EndP(pLerp(s, Pv, Pve), toLdir)))|, t = 0 .. 1)*|d/ds(pLerp(s, Pv, Pve))|, s = 0 .. 1)
