# Parametrization of line is blend between points
pos(t, p0, pM) := p0*(1 - t) + pM*t
d/dt(pos(t, p0, pM)) → pM - p0
# arclength of a line between 2 pts
integral(|pM - p0|, t = 0 .. 1) → sqrt((pM - p0)^2)
integral(vectorize(pos(t, p0, pM)*y)*|d/dt(pos(t, p0, pM))|, t = 0 .. 1) → y*(pM + p0)*sqrt((pM - p0)^2)/2
h(p) := |p| - Rp
d/dt(vectorize(pos(t)))  # error: An unexpected internal error occurred within Mathcad.
Pv
fragDir
R := 70  # Rp  # Ha
Pve_(Pv) := (0 - Pv)*fragDir + sqrt(R^2 - |Pv + ((0 - Pv)*fragDir)*fragDir|^2)
EndL(p, dir) := (0 - p)*dir + sqrt(R^2 - |p + ((0 - p)*dir)*dir|^2)  # Calculation of endpoint for view ray
EndP(p, dir) := EndL(p, dir)*dir + p
# in final solution replace all squares with direct multiplication
pLerp(t, p0, pM) := p0*(1 - t) + pM*t
h(pt) := |pt| - Rp
ro(h) := Adens0 - h/Ha*Adens0
sct(ro) := sk*ro
integral(ro(h(pLerp(t, Pv, Pve)))*|d/dt(pLerp(t, Pv, Pve))|, t = 0 .. 1) → {
    if Pv/(Pve - Pv) ≥ 0 or Pve/(Pve - Pv) ≤ 0
        -(Adens0*((Pve + Pv)*sqrt(Pve^2) - (2*Pve*Rp + 2*Ha*Pve))*sqrt((Pve - Pv)^2))/(2*Ha*Pve)
    else
        undefined
}
# this integral gives sum of leftover light over point of view ray
veiwLine(t1) := pLerp(t1, Pv, Pve)
rayLine(t2, t1) := pLerp(t2, pLerp(t1, Pv, Pve), EndL(viewLine(t1), toLdir))
rayLine(x, y) → x*(sqrt(-|viewLine(y)*(toLdir^2 - 1)|^2 + 4900) - toLdir*viewLine(y)) + (1 - x)*(Pv*(1 - y) + Pve*y)
|d/ds(pLerp(s, Pv, Pve))| → |Pve - Pv|
d/dt(pLerp(t, pLerp(s, Pv, Pve), EndP(pLerp(s, Pv, Pve), toLdir))) → toLdir*sqrt(-|((Pve - Pv)*s + Pv)*toLdir^2 + ((Pv - Pve)*s - Pv)|^2 + 4900) + ((Pv - Pve)*s - Pv)*toLdir^2
rayscat(ps) := integral(h(pLerp(t, ps, EndP(ps, toLdir)))*|d/dt(pLerp(t, ps, EndP(ps, toLdir)))|, t = 0 .. 1)
rayscat(ps) → integral(|toLdir*sqrt(-((ps*toLdir^2 - (ps + 70))*(ps*toLdir^2 + (70 - ps)))) + (ps - ps*toLdir^2)|*|toLdir*(sqrt(-((ps*toLdir^2 - (ps + 70))*(ps*toLdir^2 + (70 - ps)))) - ps*toLdir)|)*1 - (integral(|ps|*|toLdir*(sqrt(-((ps*toLdir^2 - (ps + 70))*(ps*toLdir^2 + (70 - ps)))) - ps*toLdir)|)*0 + Rp*|toLdir*(sqrt(-((ps*toLdir^2 - (ps + 70))*(ps*toLdir^2 + (70 - ps)))) - ps*toLdir)|)
Pv := 0
integral(EndL(pLerp(s, Pv, Pve), toLdir)*LmaxV, s = 0 .. 1) → -(1372000*sqrt(LmaxV^2/(Pve^2*(toLdir - 1)^2*(toLdir + 1)^2))*atan(LmaxV*(sqrt(-((Pve*toLdir^2 - (Pve + 70))*(Pve*toLdir^2 + (70 - Pve)))) - 70)/(Pve^2*(toLdir - 1)^2*(toLdir + 1)^2*sqrt(LmaxV^2/(Pve^2*(toLdir - 1)^2*(toLdir + 1)^2)))) + 2*LmaxV*Pve^2*toLdir^2 - LmaxV*Pve^2*toLdir^4 + 140*LmaxV*Pve*toLdir + (9800*LmaxV - LmaxV*Pve^2))/280 - (LmaxV*Pve^4*toLdir^8 - 4*LmaxV*Pve^4*toLdir^6 + 6*LmaxV*Pve^4*toLdir^4 - 4*LmaxV*Pve^4*toLdir^2 + LmaxV*Pve^4)/(39200*sqrt(-(Pve^2*toLdir^4) + 2*Pve^2*toLdir^2 + (4900 - Pve^2)) + 280*Pve^2*toLdir^4 - 560*Pve^2*toLdir^2 + (280*Pve^2 - 2744000))
integral(ro(h(lrps(t, s)))*EndP(pLerp(s, Pv, Pve), toLdir), t = 0 .. 1)
integral(|EndP(pLerp(s, Pv, Pve), toLdir)|*LmaxV, s = 0 .. 1)
integral(integral(ro(h(pLerp(t, pLerp(s, Pv, Pve), EndP(pLerp(s, Pv, Pve), toLdir))))*EndP(pLerp(s, Pv, Pve), toLdir), t = 0 .. 1)*LmaxV, s = 0 .. 1)
integral(integral(ro(h(pLerp(t, pLerp(s, Pv, Pve), EndP(pLerp(s, Pv, Pve), toLdir))))*|d/dt(pLerp(t, pLerp(s, Pv, Pve), EndP(pLerp(s, Pv, Pve), toLdir)))|, t = 0 .. 1)*|d/ds(pLerp(s, Pv, Pve))|, s = 0 .. 1)
