# Parametrization of line is blend between points
pos(t, p0, pM) := p0*(1 - t) + pM*t
d/dt(pos(t, p0, pM)) → pM - p0
# arclength of a line between 2 pts
integral(|pM - p0|, t = 0 .. 1) → sqrt((pM - p0)^2)
integral(vectorize(pos(t, p0, pM)*y)*|d/dt(pos(t, p0, pM))|, t = 0 .. 1) → y*(pM + p0)*sqrt((pM - p0)^2)/2
h(p) := |p| - Rp
d/dt(vectorize(pos(t)))  # error: An unexpected internal error occurred within Mathcad.
maxDistL
Pv
fragDir
R := 70  # Rp  # Ha
Pve_(Pv) := (0 - Pv)*fragDir + sqrt(R^2 - |Pv + ((0 - Pv)*fragDir)*fragDir|^2)
EndL(p, dir) := maxDistL
# Calculation of endpoint for view ray
EndP(p, dir) := maxDistL*dir + p
# in final solution replace all squares with direct multiplication
pLerp(t, p0, pM) := p0*(1 - t) + pM*t
h(pt) := |pt| - Rp
# Here, we no longer care about intersection and scan with max limit
ro(h) := max(Adens0 + h/Ha*0)
ro_acc(h) := Adens0*(1.1^(-h))
sct(ro) := sk*ro
Pv := 0
# this integral gives sum of leftover light over point of view ray
veiwLine(t1) := pLerp(t1, Pv, Pve)
rayLine(t2, t1) := pLerp(t2, pLerp(t1, Pv, Pve), EndL(viewLine(t1), toLdir))
rayLine(x, y) → Pve*y*(-x + 1) + maxDistL*x
veiwdepth := integral(ro(h(pLerp(t, Pv, Pve)))*LmaxV, t = 0 .. 1) → Adens0*LmaxV
|d/ds(pLerp(s, Pv, Pve))| → |Pve|
d/dt(pLerp(t, pLerp(s, Pv, Pve), EndP(pLerp(s, Pv, Pve), toLdir))) → maxDistL*toLdir
# how much light was scattered away at point
rayscat(ps) := integral(ro(h(pLerp(t, ps, EndP(ps, toLdir))))*|maxDistL*toLdir|, t = 0 .. 1) → Adens0*sqrt(maxDistL^2*toLdir^2)
rayscatS(ps) := sqrt(maxDistL^2*toLdir^2)*((maxDistL*toLdir + 2*ps)*sqrt((maxDistL*toLdir + ps)^2) + (2*Adens0*Ha - 2*Rp)*maxDistL*toLdir + (2*Adens0*Ha - 2*Rp)*ps)/(2*Ha*(maxDistL*toLdir + ps))
lightPowPt(pt) := Light - rayscatS(pt)
integral(integral(lightPowPt(Pve*s)*|maxDistL*toLdir|, t = 0 .. 1)*LmaxV, s = 0 .. 1) → -LmaxV*maxDistL^2*toLdir^2*sqrt(maxDistL^2*toLdir^2 + 2*Pve*maxDistL*toLdir + Pve^2)/(2*Ha) + Light*LmaxV*sqrt(maxDistL^2*toLdir^2) + (LmaxV*Rp*maxDistL^2*toLdir^2/Ha - Adens0*LmaxV*maxDistL^2*toLdir^2)
-LmaxV*maxDistL^2*toLdir^2*sqrt(maxDistL^2*toLdir^2 + 2*Pve*maxDistL*toLdir + Pve*Pve)/(2*Ha) + Light*LmaxV*sqrt(maxDistL^2*toLdir^2) + (LmaxV*Rp*maxDistL^2*toLdir^2/Ha - Adens0*LmaxV*maxDistL^2*toLdir^2)
integral(integral(ro(h(pLerp(t, pLerp(s, Pv, Pve), 60000*km*toLdir + Pve*s)))*(60000*km*toLdir + Pve*s), t = 0 .. 1)*LmaxV, s = 0 .. 1)
integral(integral(ro(h(pLerp(t, pLerp(s, Pv, Pve), EndP(pLerp(s, Pv, Pve), toLdir))))*|d/dt(pLerp(t, pLerp(s, Pv, Pve), EndP(pLerp(s, Pv, Pve), toLdir)))|, t = 0 .. 1)*|d/ds(pLerp(s, Pv, Pve))|, s = 0 .. 1)
