# Parametrization of line is blend between points
pos(t, p0, pM) := p0*(1 - t) + pM*t
d/dt(pos(t, p0, pM)) → pM - p0
# arclength of a line between 2 pts
integral(|pM - p0|, t = 0 .. 1) → sqrt((pM - p0)^2)
integral(vectorize(pos(t, p0, pM)*y)*|d/dt(pos(t, p0, pM))|, t = 0 .. 1) → y*(pM + p0)*sqrt((pM - p0)^2)/2
d/dt(vectorize(pos(t)))  # error: An unexpected internal error occurred within Mathcad.
Pv
fragDir
R := 70  # Rp  # Ha
Pve_(Pv) := (0 - Pv)*fragDir + sqrt(R^2 - |Pv + ((0 - Pv)*fragDir)*fragDir|^2)
EndL(p, dir) := (0 - p)*dir + sqrt(R^2 - |p + ((0 - p)*dir)*dir|^2)  # Calculation of endpoint for view ray
EndP(p, dir) := EndL(p, dir)*dir + p
# in final solution replace all squares with direct multiplication
pLerp(t, p0, pM) := p0*(1 - t) + pM*t
sqrLerp(t, p0, pM) := p0*(1 - sqrt(t)) + pM*sqrt(t)
ro(h) := Adens0 - h/Ha*Adens0
scat(ro) := sk*ro
endlPv
endlPve
endpPv
endpPve
vpoint(s) := pLerp(s, Pv, Pve)
Lendp(s) := pLerp(s, endpPv, endpPve)  # interpolated point of ray atmospheric exit
scanLightPt(t, s) := pLerp(t, vpoint(s), Lendp(s))
integral(ro(h(lrps(t, s)))*EndP(pLerp(s, Pv, Pve), toLdir), t = 0 .. 1)
RayAtmLen(s) := sqrLerp(s, endlPv, endlPve)  # distance to exit for light at t-point
integral(|EndP(pLerp(s, Pv, Pve), toLdir)|*LmaxV, s = 0 .. 1)
H(s) := pLerp(s, 0, Ha) → Ha*s
Hr(t, s) := pLerp(t, H(s), Ha) → Ha*s*(-t + 1) + Ha*t
# Length to current view t-point on view ray
curVLen(p) := pLerp(p, 0, LmaxV)
rayPowerLeft(s) := decayL(RayAtmLen(s)*ro(H(s)), maxdens, Light)
# sk is 0..1 where 0.9 means 10% of light gets scattered
SumDens(HS, HE, Len) := integral(ro(pLerp(p, HS, HE))*Len, p = 0 .. 1)  # Sum density over line, defined by heights
rayPowerToEye(s) := rayPowerLeft(s)*sk*focusP*ro(H(s))
RemPower(Hs, He, Len, Pow0) := sk^SumDens(Hs, He, Len)*Pow0  # Remaining power after travelling some distance at heights
vpHitPow(p) := RemPower(H(p), Ha, RayAtmLen(p), LPower)  # Total Ray power that hits point on view line
reflectedBack(p) := vpHitPow(p)*focusP*(1 - sk)  # Ray power that is reflected back as scattered light that hit point. hence (sk-1)
curPointH(p) := pLerp(p, H(0), H(curVLen(p)))
# power that reaches eye form view t-point thourgh atmos.
indirectEye(p) := RemPower(H(0), pLerp(p, H(0), H(curVLen(p))), curVLen(p), reflectedBack(p))
eyeHitPow(p) := integral(indirectEye(p)*curVLen(p), sp = 0 .. 1)
# Ray power that is reflected back as indirect light sk is 0..1
integral(eyeHitPow(p)*LmaxV, p = 0 .. 1) → -(LPower*LmaxV^2*focusP*(sk - 1)*e^(Adens0*(32*endlPve + 38*endlPv + (105*LmaxV - 42*LmaxV^2))*ln(sk)/210))/2
integral(rayPowerToEye(s)*LmaxV, s = 0 .. 1) → integral(-(Adens0*LmaxV*focusP*sk*(s - 1)*decayL(-(Adens0*(s - 1)*((endlPve - endlPv)*sqrt(s) + endlPv)), maxdens, Light)), s = 0 .. 1)
integral(RayAtmLen(s)*ro(H(s))*LmaxV, s = 0 .. 1) → Adens0*LmaxV*(8*endlPve + 7*endlPv)/30
integral(rayPowerLeft(s)*LmaxV, s = 0 .. 1) → integral(LmaxV*decayL(-(Adens0*(s - 1)*((endlPve - endlPv)*sqrt(s) + endlPv)), maxdens, Light), s = 0 .. 1)
integral(integral(ro(h(scanLightPt(t, s)))*Lendp(s), t = 0 .. 1)*LmaxV, s = 0 .. 1)
integral(integral(ro(h(pLerp(t, pLerp(s, Pv, Pve), EndP(pLerp(s, Pv, Pve), toLdir))))*|d/dt(pLerp(t, pLerp(s, Pv, Pve), EndP(pLerp(s, Pv, Pve), toLdir)))|, t = 0 .. 1)*|d/ds(pLerp(s, Pv, Pve))|, s = 0 .. 1)
