# Parametrization of line is blend between points
pos(t, p0, pM) := p0*(1 - t) + pM*t
d/dt(pos(t, p0, pM)) → pM - p0
# arclength of a line between 2 pts
integral(|pM - p0|, t = 0 .. 1) → sqrt((pM - p0)^2)
integral(vectorize(pos(t, p0, pM)*y)*|d/dt(pos(t, p0, pM))|, t = 0 .. 1) → y*(pM + p0)*sqrt((pM - p0)^2)/2
d/dt(vectorize(pos(t)))  # error: An unexpected internal error occurred within Mathcad.
Pv
fragDir
R := 70  # Rp  # Ha
Pve_(Pv) := (0 - Pv)*fragDir + sqrt(R^2 - |Pv + ((0 - Pv)*fragDir)*fragDir|^2)
EndL(p, dir) := (0 - p)*dir + sqrt(R^2 - |p + ((0 - p)*dir)*dir|^2)  # Calculation of endpoint for view ray
EndP(p, dir) := EndL(p, dir)*dir + p
# in final solution replace all squares with direct multiplication
pLerp(t, p0, pM) := p0*(1 - t) + pM*t
sqrLerp(t, p0, pM) := p0*(1 - sqrt(t)) + pM*sqrt(t)
ro(h) := Adens0 - h/Ha*Adens0
scat(ro) := sk*ro
endlPv
endlPve
endpPv
endpPve
vpoint(s) := pLerp(s, Pv, Pve)
Lendp(s) := pLerp(s, endpPv, endpPve)  # interpolated point of ray atmospheric exit
scanLightPt(t, s) := pLerp(t, vpoint(s), Lendp(s))
integral(ro(h(lrps(t, s)))*EndP(pLerp(s, Pv, Pve), toLdir), t = 0 .. 1)
RayAtmLen(s) := pLerp(s, endlPv, endlPve)  # distance to exit for light at t-point
integral(|EndP(pLerp(s, Pv, Pve), toLdir)|*LmaxV, s = 0 .. 1)
H(s) := pLerp(s, 0, Ha) → Ha*s
Hr(t, s) := pLerp(t, H(s), Ha) → Ha*s*(-t + 1) + Ha*t
# Length to current view t-point on view ray
curVLen(p) := pLerp(p, 0, LmaxV)
rayPowerLeft(s) := decayL(RayAtmLen(s)*ro(H(s)), maxdens, Light)
# sk is 0..1 where 0.9 means 10% of light gets scattered
# Sum density over line, defined by heights
rayPowerToEye(s) := rayPowerLeft(s)*sk*focusP*ro(H(s))
SumDens(HS, HE, Len) := integral(ro(pLerp(t1, HS, HE))*Len, t1 = 0 .. 1)
RemPower(Hs, He, Len, Pow0) := sk^SumDens(Hs, He, Len)*Pow0  # Remaining power after travelling some distance at heights
vpHitPow(p) := RemPower(H(p), Ha, RayAtmLen(p), LPower)  # Total Ray power that hits point on view line
reflectedBack(p) := vpHitPow(p)*focusP*(1 - sk)  # Ray power that is reflected back as scattered light that hit point. hence (sk-1)
indirectEye(p) := RemPower(H(0), H(p), curVLen(p), reflectedBack(p))  # power that reaches eye form view t-point thourgh atmos.
integral(indirectEye(pp)*LmaxV, pp = 0 .. 1) → -(LPower*LmaxV*focusP*(sk - 1)*sqrt(2*π)*e^(Adens0*(endlPve^2 + 4*LmaxV*endlPve + (4*LmaxV^2 - 4*LmaxV*endlPv))*ln(sk)/(8*endlPve + (8*LmaxV - 8*endlPv)))*(erf(sqrt(2)*(endlPve + (2*LmaxV - 2*endlPv))*sqrt(Adens0*(endlPve + (LmaxV - endlPv))*ln(sk))/(4*endlPve + (4*LmaxV - 4*endlPv))) + erf(endlPve*sqrt(2)*sqrt(Adens0*(endlPve + (LmaxV - endlPv))*ln(sk))/(4*endlPve + (4*LmaxV - 4*endlPv)))))/(2*sqrt(Adens0*(endlPve + (LmaxV - endlPv))*ln(sk)))
curPointH(0.2) → curPointH(0.2)
integral(rayPowerToEye(s)*LmaxV, s = 0 .. 1) → integral(-(Adens0*LmaxV*focusP*sk*(s - 1)*decayL(-(Adens0*(s - 1)*((endlPve - endlPv)*s + endlPv)), maxdens, Light)), s = 0 .. 1)
integral(RayAtmLen(s)*ro(H(s))*LmaxV, s = 0 .. 1) → Adens0*LmaxV*endlPve/6 + Adens0*LmaxV*endlPv/3
integral(rayPowerLeft(s)*LmaxV, s = 0 .. 1) → integral(LmaxV*decayL(-(Adens0*(s - 1)*((endlPve - endlPv)*s + endlPv)), maxdens, Light), s = 0 .. 1)
integral(integral(ro(h(scanLightPt(t, s)))*Lendp(s), t = 0 .. 1)*LmaxV, s = 0 .. 1)
integral(integral(ro(h(pLerp(t, pLerp(s, Pv, Pve), EndP(pLerp(s, Pv, Pve), toLdir))))*|d/dt(pLerp(t, pLerp(s, Pv, Pve), EndP(pLerp(s, Pv, Pve), toLdir)))|, t = 0 .. 1)*|d/ds(pLerp(s, Pv, Pve))|, s = 0 .. 1)
