# Parametrization of line is blend between points
pos(t, p0, pM) := p0*(1 - t) + pM*t
d/dt(pos(t, p0, pM)) → pM - p0
# arclength of a line between 2 pts
integral(|pM - p0|, t = 0 .. 1) → sqrt((pM - p0)^2)
integral(vectorize(pos(t, p0, pM)*y)*|d/dt(pos(t, p0, pM))|, t = 0 .. 1) → y*(pM + p0)*sqrt((pM - p0)^2)/2
h(p) := |p| - Rp
d/dt(vectorize(pos(t)))  # error: An unexpected internal error occurred within Mathcad.
Pv
fragDir
R := 70  # Rp  # Ha
Pve_(Pv) := (0 - Pv)*fragDir + sqrt(R^2 - |Pv + ((0 - Pv)*fragDir)*fragDir|^2)
EndL(p, dir) := (0 - p)*dir + sqrt(R^2 - |p + ((0 - p)*dir)*dir|^2)  # Calculation of endpoint for view ray
EndP(p, dir) := EndL(p, dir)*dir + p
# in final solution replace all squares with direct multiplication
pLerp(t, p0, pM) := p0*(1 - t) + pM*t
ro(h) := Adens0 - h/Ha*Adens0
scat(ro) := sk*ro
endlPv
endlPve
endpPv
endpPve
vpoint(s) := pLerp(s, Pv, Pve)
Lendp(s) := pLerp(s, endpPv, endpPve)
scanLightPt(t, s) := pLerp(t, vpoint(s), Lendp(s))
integral(ro(h(lrps(t, s)))*EndP(pLerp(s, Pv, Pve), toLdir), t = 0 .. 1)
RayAtmLen(s) := pLerp(s, endlPv, endlPve)  # length of ray through atmosphere to v point
integral(|EndP(pLerp(s, Pv, Pve), toLdir)|*LmaxV, s = 0 .. 1)
H(s) := pLerp(s, 0, Ha) → Ha*s
Hr(t, s) := pLerp(t, H(s), Ha) → Ha*s*(-t + 1) + Ha*t
# sk is 0..1 where 0.9 means 10% of light gets scattered
rayPowerLeft(s) := Light*sk^integral(ro(RayH)*RayAtmLen(s), t = 0 .. 1)
rayPowerToEye(s) := rayPowerLeft(s)*sk*focusP*ro(H(s))
integral(rayPowerToEye(s)*LmaxV, s = 0 .. 1) → Ha*Light*LmaxV*focusP*sk*((((Adens0*RayH - Adens0*Ha)*endlPve + (Adens0*Ha - Adens0*RayH)*endlPv)*ln(sk) - Ha)*e^(-(Adens0*endlPv*(RayH - Ha)*ln(sk))/Ha) + Ha*e^(-(Adens0*endlPve*(RayH - Ha)*ln(sk))/Ha))/(Adens0*(RayH - Ha)^2*(endlPve - endlPv)^2*ln(sk)^2)
integral(rayPowerLeft(s)*LmaxV, s = 0 .. 1) → Ha*Light*LmaxV*(e^(-(Adens0*endlPv*(RayH - Ha)*ln(sk))/Ha) - e^(-(Adens0*endlPve*(RayH - Ha)*ln(sk))/Ha))/(Adens0*(RayH - Ha)*(endlPve - endlPv)*ln(sk))
integral(integral(ro(h(scanLightPt(t, s)))*Lendp(s), t = 0 .. 1)*LmaxV, s = 0 .. 1)
integral(integral(ro(h(pLerp(t, pLerp(s, Pv, Pve), EndP(pLerp(s, Pv, Pve), toLdir))))*|d/dt(pLerp(t, pLerp(s, Pv, Pve), EndP(pLerp(s, Pv, Pve), toLdir)))|, t = 0 .. 1)*|d/ds(pLerp(s, Pv, Pve))|, s = 0 .. 1)
