pLerp(t, p0, pM) := p0*(1 - t) + pM*t
sqrLerp(t, p0, pM) := p0*(1 - sqrt(t)) + pM*sqrt(t)
ro(h) := Adens0 - h/Ha*Adens0
vpoint(s) := pLerp(s, Pv, Pve)
Lendp(s) := pLerp(s, endpPv, endpPve)
scanLightPt(t, s) := pLerp(t, vpoint(s), Lendp(s))
RayAtmLen(s) := pLerp(s, endlPv, endlPve)
# interpolated point of ray atmospheric exit
H(s) := pLerp(s, 0, Ha) → Ha*s
Hr(t, s) := pLerp(t, H(s), Ha) → Ha*s*(-t + 1) + Ha*t
# distance to exit for light at t-point
# Length to current view t-point on view ray
curVLen(p) := pLerp(p, 0, LmaxV)
# Sum density over line, defined by heights
SumDens(HS, HE, Len) := integral(ro(pLerp(t1, HS, HE))*Len, t1 = 0 .. 1)
# Remaining power after travelling some distance at heights
# sk is 0..1 where 0.9 means 10% of light gets scattered
ProdDensI(HS, HE, Len) := exp(integral(ln(sk*ro(pLerp(t, HS, HE)))*Len, t = 0 .. 1))
ProdDensFull(HS, HE, Len) := e^(Len*((Ha - HE)*ln(Adens0*sk*(Ha - HE)/Ha) + (HS - Ha)*ln(Adens0*sk*(Ha - HS)/Ha) + (HE - HS))/(HS - HE))
RemPowerSum(Hs, He, Len, Pow0) := (1 - SumDens(Hs, He, Len)/maxdens)*Pow0
# (1/(x+70))*70 IS AT 1...0AT INF.
ProdDensAvg(HS, HE, Len) := sk*ro((HS + HE)/2)*Len
RemPower(Hs, He, Len, Pow0) := Pow0*ProdDensAvg(Hs, He, Len)  # remaining direct ray power, after travelling Len from Hs to He.
vpHitPow(pv) := RemPower(H(pv), Ha, RayAtmLen(pv), LPower)  # Total Ray power that hits point on view line
# hf0- height at which it is 0, hfmax - height at which it is 1.
foc(hf) := (hf + hf0)/hfmax
reflectedBack(pr) := vpHitPow(pr)*focusP*(1 - sk)  # Ray power that is reflected towards eye as scattered light. hence (sk-1)
indirectEye(pn) := RemPower(H(0), H(pn), curVLen(pn), reflectedBack(pn))  # power that reaches eye form view t-point thourgh atmos.
indirectEye(0.5)
integral(indirectEye(pp)*LmaxV, pp = 0 .. 1) → -(Adens0^2*LPower*LmaxV^2*sk^2*((7*endlPve + 8*endlPv)*hf0 + 4*Ha*endlPve + 3*Ha*endlPv)*(sk - 1))/(240*hfmax)
curPointH(0.2) → curPointH(0.2)
integral(rayPowerToEye(s)*LmaxV, s = 0 .. 1) → integral(LmaxV*rayPowerToEye(s), s = 0 .. 1)
integral(RayAtmLen(s)*ro(H(s))*LmaxV, s = 0 .. 1) → Adens0*LmaxV*endlPve/6 + Adens0*LmaxV*endlPv/3
integral(rayPowerLeft(s)*LmaxV, s = 0 .. 1) → integral(LmaxV*rayPowerLeft(s), s = 0 .. 1)
integral(integral(ro(h(scanLightPt(t, s)))*Lendp(s), t = 0 .. 1)*LmaxV, s = 0 .. 1)
integral(integral(ro(h(pLerp(t, pLerp(s, Pv, Pve), EndP(pLerp(s, Pv, Pve), toLdir))))*|d/dt(pLerp(t, pLerp(s, Pv, Pve), EndP(pLerp(s, Pv, Pve), toLdir)))|, t = 0 .. 1)*|d/ds(pLerp(s, Pv, Pve))|, s = 0 .. 1)
