pLerp(t, p0, pM) := p0*(1 - t) + pM*t
sqrLerp(t, p0, pM) := p0*(1 - sqrt(t)) + pM*sqrt(t)
ro(h) := Adens0 - h/Ha*Adens0
vpoint(s) := pLerp(s, Pv, Pve)
Lendp(s) := pLerp(s, endpPv, endpPve)
scanLightPt(t, s) := pLerp(t, vpoint(s), Lendp(s))
RayAtmLen(s) := pLerp(s, endlPv, endlPve)
# interpolated point of ray atmospheric exit
H(s) := pLerp(s, 0, Ha) → Ha*s
Hr(t, s) := pLerp(t, H(s), Ha) → Ha*s*(-t + 1) + Ha*t
# distance to exit for light at t-point
# Length to current view t-point on view ray
curVLen(p) := pLerp(p, 0, LmaxV)
# Sum density over line, defined by heights
SumDens(HS, HE, Len) := integral(ro(pLerp(t1, HS, HE))*Len, t1 = 0 .. 1)
# Remaining power after travelling some distance at heights
# sk is 0..1 where 0.9 means 10% of light gets scattered
ProdDensI(HS, HE, Len) := exp(integral(ln(sk*ro(pLerp(t, HS, HE)))*Len, t = 0 .. 1))
ProdDensFull(HS, HE, Len) := e^(Len*((Ha - HE)*ln(Adens0*sk*(Ha - HE)/Ha) + (HS - Ha)*ln(Adens0*sk*(Ha - HS)/Ha) + (HE - HS))/(HS - HE))
RemPowerSum(Hs, He, Len, Pow0) := (1 - SumDens(Hs, He, Len)/maxdens)*Pow0
# (1/(x+70))*70 IS AT 1...0AT INF.
ProdDensAvg(HS, HE, Len) := ((1 - sk) + prk*sk)*ro((HS + HE)/2)*Len  # SK is percent of light scattered(1-sk). + propogated part of scattered light prk*sk
ProdDensAvgI(HS, HE, Len) := exp(integral(ln(((1 - sk) + prk*sk)*ro((HS + HE)/2)), r = 0 .. 1)) → e^(ln(-Adens0^2*(HS + HE)*(4*Ha - (HS + HE))*((prk - 1)*sk + 1)^2/(4*Ha^2) + (Adens0^2*prk^2 - 2*Adens0^2*prk + Adens0^2)*sk^2 + (2*Adens0^2*prk - 2*Adens0^2)*sk + Adens0^2)/2)
ProdDensAvgP(HS, HE, Len) := (((1 - sk) + prk*sk)*ro((HS + HE)/2))^Len
RemPower(Hs, He, Len, Pow0) := Pow0*ProdDensAvgP(Hs, He, Len)
# remaining direct ray power, after travelling Len from Hs to He.
RemPowerEye(Hs, He, Len, Pow0) := Pow0
vpHitPow(pv) := RemPower(H(pv), Ha, RayAtmLen(pv), LPower)  # Total Ray power that hits point on view line
# hf0- height at which it is 0, hfmax - height at which it is 1.
foc(hf) := (hf + hf0)/hfmax
# Ray power that is reflected towards eye as scattered light. focusP is percent of sk
remBot := LPower*(((1 - sk) + prk*sk)*ro(H(0)))^endlPve
remTop := LPower*(((1 - sk) + prk*sk)*ro(Ha))^endlPv
lerpHitPow(pv) := sqrLerp(pv, remBot, remTop)
reflectedBack(pr) := lerpHitPow(pr)*focusP*sk
indirectEye(pn) := RemPowerEye(H(0), H(pn), curVLen(pn), reflectedBack(pn))  # power that reaches eye form view t-point thourgh atmos.
indirectEye(0.5)
integral(indirectEye(pp)*LmaxV, pp = 0 .. 1) → LPower*LmaxV*focusP*sk*(Adens0*((prk - 1)*sk + 1))^endlPve/3
integral((f*(x - 1))^(k*x + k1)*(g*x + gs)^(k2*x), x = 0 .. 1) → integral((g*x + gs)^(k2*x)*(f*(x - 1))^(k*x + k1), x = 0 .. 1)
LPower*LmaxV*focusP*sk*(7*endlPve + 8*endlPv)*sqrt(Adens0^2*LmaxV^2*((prk - 1)*sk + 1)^2)*sqrt(Adens0^2*endlPve^2*((prk - 1)*sk + 1)^2)/(240*endlPve)
curPointH(0.2) → curPointH(0.2)
integral(rayPowerToEye(s)*LmaxV, s = 0 .. 1) → integral(LmaxV*rayPowerToEye(s), s = 0 .. 1)
integral(RayAtmLen(s)*ro(H(s))*LmaxV, s = 0 .. 1) → Adens0*LmaxV*endlPve/6 + Adens0*LmaxV*endlPv/3
integral(rayPowerLeft(s)*LmaxV, s = 0 .. 1) → integral(LmaxV*rayPowerLeft(s), s = 0 .. 1)
integral(integral(ro(h(scanLightPt(t, s)))*Lendp(s), t = 0 .. 1)*LmaxV, s = 0 .. 1)
integral(integral(ro(h(pLerp(t, pLerp(s, Pv, Pve), EndP(pLerp(s, Pv, Pve), toLdir))))*|d/dt(pLerp(t, pLerp(s, Pv, Pve), EndP(pLerp(s, Pv, Pve), toLdir)))|, t = 0 .. 1)*|d/ds(pLerp(s, Pv, Pve))|, s = 0 .. 1)
