# Parametrization of line is blend between points
pos(t, p0, pM) := p0*(1 - t) + pM*t
d/dt(pos(t, p0, pM)) → pM - p0
# arclength of a line between 2 pts
|vectorize(d/dt(vectorize(pos(t, p0, pM))))| → |pM - p0|
integral(|pM - p0|, t = 0 .. 1) → sqrt((pM - p0)^2)
integral(vectorize(pos(t, p0, pM)*y)*|pM - p0|, t = 0 .. 1) → y*(pM + p0)*sqrt((pM - p0)^2)/2
integral(vectorize(pos(t, p0, pM)*y)*|d/dt(pos(t, p0, pM))|, t = 0 .. 1) → y*(pM + p0)*sqrt((pM - p0)^2)/2
integral(|pM - p0|, t = 0 .. 1) → sqrt((pM - p0)^2)
h(p) := |p| - Rp  # error: This variable is undefined. Check that the label is set correctly.
pV := [pVx; pVy; pVz]  # error: This variable is undefined. Check that the label is set correctly.
y := [1; 0]
d/dt(vectorize(pos(t)))  # error: An unexpected internal error occurred within Mathcad.
pM := [4; 4]
ro(h) := Adens0 - h/Ha*Adens0  # error: This variable is undefined. Check that the label is set correctly.
4*4/2 + 4 = 12
p0 := [0; 0]
pM*y = 4
pE := [pEx; pEy; pEz]  # error: This variable is undefined. Check that the label is set correctly.
# in final solution replace all squares with direct multiplication
h(pos) := |pos*y|
sqrt((pM - p0)^2) = [4; 4]
sqrt((pM - p0)*(pM - p0)) = 5.65685
d/dt(pos(t, p0, pM)) → [4; 4]
4*sqrt(2) = 5.65685
integral(h(pos(t, p0, pM))*|d/dt(pos(t, p0, pM))|, t = 0 .. 1) → 8*sqrt(2)
y*(pM + p0)*sqrt((pM - p0)*(pM - p0))/2 = 11.3137
integral((y*pos(t, p0, pM))*|d/dt(pos(t, vectorize(p0), vectorize(pM)))|, t = 0 .. 1) → 8*sqrt(2)
|d/dt(pos(t, p0, pM))| → 4*sqrt(2)
integral(Pey*t*sqrt(Pex^2 + Pey^2), t = 0 .. 1) → Pey*sqrt(Pey^2 + Pex^2)/2
Pey := 4
Pex := 4
Pey*sqrt(Pey^2 + Pex^2)/2 = 11.3137
R(t) := [4*t; 4*t]
d/dt(R(t)) → [4; 4]
f(R) := R*[0; 1]
integral(x, x = 0 .. 4) = 8
x(t) := t*4
f(x) := x
integral(f(x(t))*|d/dt(x(t))|, t = 0 .. 1) → 8 = 8
